# Worksheet setting: ORIGIN = 1
# Задание 4.1
# Ответ: 18 единиц товара А1 и 15 единиц товара А2 позволят получить максимальную прибыль от продаж.
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f(x1, x2) := 55*x1 + 65*x2
Given
x1 := 0
0.8*x1 + 0.3*x2 ≤ 19
0.2*x1 + 0.3*x2 ≤ 14
0.2*x1 + 0.9*x2 ≤ 17
x1 ≥ 0
x2 ≥ 0
x2 := 0
Maximize(f, x1, x2) = [18.1818; 14.8485]
x1 := 18
x2 := 15
f(x1, x2) = 1965
# Задание 4.2
# Ответ: при 5.75 кг смеси А1 получится минимизировать расходы предприятия на смеси
f2(A1, A2, A3) := 12*A1 + 7*A2 + 11*A3
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Given
A1 := 0
A2 := 0
A3 := 0
0.8*A1 + 0.3*A2 + 0.2*A3 ≥ 4.6
0.9*A1 + 0.2*A2 + 0.3*A3 ≥ 3.6
A1 ≥ 0
A2 ≥ 0
A3 ≥ 0
Minimize(f2, A1, A2, A3) = [5.75; 0; 0]
f2(5.75, 0, 0) = 69
# Задание 4.3
# Ответ: 1-ому поставщику необходимо весь груз направить к 3-у потребителю.
# 2-ому поставщику направить ко 2-у потребителю (28 ед.), к 3-у потребителю (11 ед.).
# А 3-ему поставщику направить к 1-у потребителю (50 ед.), к 3-у потребителю (10 ед.), к 4-у потребителю (1 ед.), к 5-у потребителю (10 ед.).
# Тогда минимальные затраты составят 955.
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# Определение типа задачи:
sumAi := 15 + 39 + 71 = 125
sumBi := 50 + 28 + 36 + 1 = 115
# Поскольку sumAi > sumBi, данная транспортная задача является открытой. Добавим дополнительного фиктивного потребителя со спросом 10.
ORIGIN := 1
i := 1 .. 3
j := 1 .. 5
ck := [40, 43, 6, 36, 0; 46, 16, 28, 47, 0; 2, 38, 44, 9, 0]
a := [15; 39; 71]
b := [50; 28; 36; 1; 10]
x[i, j] := 1
t[j] := 1
l[i] := 1
f31(x) := sum(sum(ck[i, j]*x[i, j], j = 1 .. 5), i = 1 .. 3)
Given
transpose(x)*l == b
x*t == a
x ≥ 0
Minimize(f31, x) = [0, 0, 15, 0, 0; 0, 28, 11, 0, 0; 50, 0, 10, 1, 10]
answer := [0, 0, 15, 0, 0; 0, 28, 11, 0, 0; 50, 0, 0, 1, 10]
f31(answer) = 955
# Задание 4.4
# Ответ: Минимум функции в -189
x1 := -20
x2 := -5
x3 := -2
Z(x1, x2, x3) := 3*x1 + 4*x2 + 2*x3
Given
15*x1 + 16*x2 - 17*x3 ≤ 120
18*x1 - 19*x2^2 + 20*x3 ≤ 130
-21*x1^2 + 22*x2 + 23*x3 ≤ 140
f := Minimize(Z, x1, x2, x3)  # error: Эта переменная не определена.
f := -189
